clear

# ----- MD parameters -----
variable tstep   equal 0.000500
variable tdamp   equal 0.050000
variable MDTIME  equal 100.000000

variable NRUN      equal ${MDTIME}/${tstep}
variable THERSTEP  equal ${NRUN}/100
variable DUMPSTEP  equal ${NRUN}/10
variable TEMP      equal 300.00

variable  kb   equal 1.3806488e-23
variable  ee   equal 1.60217657e-19

# ----- Initialize simulation -----
units         metal
atom_style    atomic
dimension     3
boundary      p p p
atom_modify   map array
read_restart  restart0.nemd
timestep      ${tstep}

# ----- Define LJ potential -----
variable   cutoff equal 12.0000000
variable  epsilon equal 0.0023900
variable    sigma equal 3.4000000

pair_style hybrid lj/cut ${cutoff} tersoff tersoff
pair_coeff * * tersoff 1 opt.tersoff C NULL
pair_coeff * * tersoff 2 opt.tersoff NULL C
pair_coeff 1 2 lj/cut ${epsilon} ${sigma}

# ---- Bin -----
neighbor      0.3 bin
neigh_modify  delay 0

# ----- Group -----
group   bottom id 1:96
group      hot id 97:288
group   middle id 289:1248
group     cold id 1249:1440
group      top id 1441:1536

group const  union bottom top
group mobile union hot middle cold
group free   union middle

# ----- compute -----
compute   1        all temp
compute   ke       all ke/atom

reset_timestep 0

# ----- NEMD simulation -----
fix frozen const setforce 0.0 0.0 0.0
fix t1 hot  nvt temp 310.00 310.00 ${tdamp}
fix t2 cold nvt temp 290.00 290.00 ${tdamp}
fix m1 free nve

variable     temp atom c_ke*${ee}/1.5/${kb}
variable     diff equal f_t2-f_t1
fix          tempave all ave/atom 1 ${DUMPSTEP} ${DUMPSTEP} v_temp

thermo_style custom step pe temp f_t1 f_t2 v_diff
thermo       ${THERSTEP}
dump         nemd all custom ${DUMPSTEP} nemd1.dump id type x y z vx vy vz f_tempave
dump_modify  nemd sort id
dump_modify  nemd format float %13.8f
run          ${NRUN}
undump     nemd

write_restart  restart1.nemd

print "All done!"
